# Worksheet setting: ORIGIN = 1
# [area: Data]
kmol := 10^3*mol
kJ := 10^3*J
# Molar gas universal constant
R_u := 8.314472*joule/(mole*K)
# Boltzmann's constant
k_b := 1.3806505*10^-23*joule/K
# Molecular weight
M_w := 28.013*kg/kmol
# Enthalpy reference temperature
T_ref := 298.15*K
# Critical Temperature
T_c := 126.192*K
# Critical Pressure
P_c := 3.3958*MPa
# Critical Density
ρ_c := 313.300*kg/m^3
# Acentric factor
ω := 0.0372
# Normal boiling point
T_b := 77.355*K
# Nist Site
# [component: outputs P_H_data]
# [component: outputs P_L_data]
# data preperation
TITLE :=
    data ← transpose(transpose(P_H_data)[:, 1])
    data[:, last(transpose(data)[:, 1])] ← "Cp_2 (kJ/kg*K)"
    data
P_H_data := submatrix(P_H_data, 2, rows(P_H_data), 1, cols(P_H_data))
P_L_data := submatrix(P_L_data, 2, rows(P_L_data), 1, cols(P_L_data))
T_H_vec := P_H_data[:, 1]*K
T_L_vec := P_L_data[:, 1]*K
# data fitting functions
F2(x, data, col) := linterp(data[:, 1], data[:, col], x)
# Enthalpy reference correction
h_H_Tref := F2(T_ref*K^-1, P_H_data, 6)
h_L_Tref := F2(T_ref*K^-1, P_L_data, 6)
P_H_data[:, 6] := P_H_data[:, 6] - h_H_Tref
P_L_data[:, 6] := P_L_data[:, 6] - h_L_Tref
# Calculating pseudo cp (cp_2)
P_H_data[:, last(transpose(P_H_data)[:, 1])] := round(P_H_data[:, 6]/((T_H_vec - T_ref)*K^-1), 5)
P_L_data[:, last(transpose(P_L_data)[:, 1])] := round(P_L_data[:, 6]/((T_L_vec - T_ref)*K^-1), 5)
# [component: inputs TITLE; outputs prop_select]
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# [component: inputs transpose(TITLE)[prop_select]]
# [component: inputs transpose(TITLE)[prop_select]]
# [area: Properies_dedinition]
ρ_H(T) := F2(T*K^-1, P_H_data, 3)*kg/m^3
ρ_L(T) := F2(T*K^-1, P_L_data, 3)*kg/m^3
c_p_H(T) := F2(T*K^-1, P_H_data, 14)*(J/(gm*K))
c_p_L(T) := F2(T*K^-1, P_L_data, 14)*(J/(gm*K))
c_s_H(T) := F2(T*K^-1, P_H_data, 10)*m/s
c_s_L(T) := F2(T*K^-1, P_L_data, 10)*m/s
μ_f_H(T) := F2(T*K^-1, P_H_data, 12)*Pa*s
μ_f_L(T) := F2(T*K^-1, P_L_data, 12)*Pa*s
k_f_H(T) := F2(T*K^-1, P_H_data, 13)*W/(m*K)
k_f_L(T) := F2(T*K^-1, P_L_data, 13)*W/(m*K)
Pr_H(T) := F2(T*K^-1, P_H_data, 9)*(J/(gm*K))*μ_f_H(T)/k_f_H(T)
Pr_L(T) := F2(T*K^-1, P_L_data, 9)*(J/(gm*K))*μ_f_L(T)/k_f_L(T)
γ_H(T) := F2(T*K^-1, P_H_data, 9)/F2(T*K^-1, P_H_data, 8)
γ_L(T) := F2(T*K^-1, P_L_data, 9)/F2(T*K^-1, P_L_data, 8)
h_L(T) := F2(T*K^-1, P_L_data, 6)*kJ/kg
h_H(T) := F2(T*K^-1, P_H_data, 6)*kJ/kg
v_s_H(T) := F2(T*K^-1, P_H_data, 10)*m/s
v_s_L(T) := F2(T*K^-1, P_L_data, 10)*m/s
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max(vectorize(P_H_data[:, 9]/P_H_data[:, 14]) - 1) = 76.8267 %
max(vectorize(P_L_data[:, 9]/P_L_data[:, 14]) - 1) = 3.59787 %
