# Worksheet setting: ORIGIN = 1
# [reference: refprop2mathcad_new.xmcd]
# [area: Theory]
# 1. hot stream:  m_h*h_h_in - m_h*(h_h_in - dh_h) - U_h*(A_conv/L_ch*dx)*(T_h - T_w) == 0  @ h == m*Cp, Cp ≠ Cp(T)
# ⇒  d/dx(T_h) + U_h*A_conv/(m_h*Cp_h*L_ch)*(T_h - T_w) == 0  @ θ_h == (T_h - T_c_in)/(T_h_in - T_c_in), NTU_h == U_h*A_conv/(m_h*Cp_h), X == x/L_ch
#
# d/dX(θ_h) + NTU_h*(θ_h - θ_w) == 0  B.C: θ_h(0) == 1
#
# 2. cold stream: m_c*(h_c - dh_c) - h_c*m_c - U_c*(A_conv/L_ch*(-dx))*(T_c - T_w) == 0
# ⇒  d/dx(T_c) + U_c*A_conv/(m_c*Cp_c*L_ch)*(T_w - T_c) == 0  @ θ_c == (T_c - T_c_in)/(T_h_in - T_v_in), NTU_c == U_c*A_conv/(m_c*Cp_c), X == x/L_ch
#
# d/dX(θ_c) + NTU_h*(θ_w - θ_c) == 0  B.C: θ_c(1) == 0
#
# 3. wall conduction:  A_cond*q''_x - A_cond*(q''_x + dq''_x) + U_h*(A_conv/L_ch*dx)*(T_h - T_w) - U_c*(A_conv/L_ch*dx)*(T_w - T_c) == 0
# @ dq'' == -k_w*(d/dx(T))
#
# ⇒  d^2/dx^2(T_w) + U_h*A_conv/(L_ch*(k_w*A_cond))*(T_h - T_w) - U_c*A_conv/(L_ch*(k_w*A_cond))*(T_w - T_c) == 0  @ θ_w == (T_w - T_c_in)/(T_h_in - T_c_in), X == x/L_ch, C_c == m_c*Cp_c , C_h == m_h*Cp_h , C_min == min(C_c, C_h)
#
# ⇒  d^2/dX^2(θ_w) + U_h*A_conv/C_h*C_h/C_min*C_min*L_ch/(k_w*A_cond)*(θ_h - θ_w) - U_c*A_conv/C_c*C_c/C_h*C_h/C_min*C_min*L_ch/(k_w*A_cond)*(θ_w - θ_c) == 0
# @ ν == C_c/C_h, μ == C_h/C_min, λ == k_w*A_cond/(L_ch*C_min)
# d^2/dX^2(θ_w) + NTU_h*μ/λ*(θ_h - θ_w) - NTU_c*ν*μ/λ*(θ_w - θ_c) == 0  B.Cs: θ'_w(0) == θ'_w(1) == 0  - wall ends insulated
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# system od ODEs
# θ_h == y_1  d/dX(θ_h) == NTU_h*(θ_w - θ_h)  B.C:  θ_h(0) == 1
# θ_c == y_2  ⇒  d/dX(θ_c) == NTU_c(θ_c - θ_w)  B.C:  θ_c(1) == 0
# θ_w == y_3 , θ_w' == y_3' == y_4  d/dX(θ_w) == y_3' == y_4
# d^2/dX^2(θ_w) == d/dX(d/dX(θ_w)) == NTU_h*μ/λ*(θ_w - θ_h) + NTU_c*ν*μ/λ*(θ_w - θ_c)  B.Cs:  θ'_w(0) == θ'_w(1) == 0
# Resultand Boundary Value Problem - BVP
# B.Cs:
[y_1(0) == 1; y_2(1) == 0; y_4(0) == 0; y_4(1) == 0]
[y_1'; y_2'; y_3'; y_4'] == [NTU_h*(y_3 - y_1); NTU_h*(y_2 - y_3); y_4; NTU_h*μ/λ*(y_3 - y_1) + NTU_c*ν*μ/λ*(y_3 - y_2)]
# In order to solve such a problem, it have to be modified into initial values problem.
# It means that y_2(1) == 0 and y_4(1) == 0 conditions, must be replaced.
# Shooting method is used in order to acheive two unknown initial conditions using using matching boundary conditions.
# In mathcad "sbval" - function used for this purpose.
# In matlab "bvp4c" - function used.
# [area: PRE]
## fluent results extraction
# auxiliary functions - Parameters Position Finder
PPF(string, title, j) := if(search(title[j], string, 0) ≥ 0, j, PPF(string, title, j + 1))
# Conditions Extractor
Test_title := transpose(FLUENT)[:, ORIGIN]
FLUENT := trim(FLUENT, [1; 2])  # error: This value must be a matrix.
Δp_H_FLUENT := FLUENT[:, PPF("DP_H", Test_title, 1)]*Pa
Δp_L_FLUENT := FLUENT[:, PPF("DP_L", Test_title, 1)]*Pa
T_H_out_FLUENT := FLUENT[:, PPF("T_H_OUT", Test_title, 1)]*K
T_L_out_FLUENT := FLUENT[:, PPF("T_L_OUT", Test_title, 1)]*K
δQ_H_FLUENT := FLUENT[:, PPF("DQ_H", Test_title, 1)]*W
δQ_L_FLUENT := FLUENT[:, PPF("DQ_L", Test_title, 1)]*W
m_ch_FLUENT := FLUENT[:, PPF("m_ch", Test_title, 1)]*kg/s
FLUENT_CASES := FLUENT[:, ORIGIN]
## Geometry relations
# Wet etching production dependency (50μm is mask precision)
δ_mask := 50*μm
S_w := y_H*2 + δ_mask + d_H
d_L := S_w - δ_mask - 2*y_L
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# Design Constraints
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Nu_factor := 1
Δp_L_T := 10*psi
# [component: outputs tube_form]
f'_factor := 2.5
ΔQ_T := 10*W
w_HE := 10*mm
L_HE := 27.5*mm
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# Nist Site
T_H_in := 300*K
T_L_in := 80*K
# STRENGTH CALCULATOR
p_H_in := 2300*psi
p_L_in := p_sat_N2(T_L_in)*0.99  # HOLMAN
t_w := 0.2*mm
k_w := 1.14*W*m^-1*K^-1
T_H_out* := 140*K
T_L_out* := 280*K
# [area: SOLVER + POST]
## Calculating Nitrogen properties
# Properties vectors
N_pts := 21
# Properties vectors
ind := 1 .. N_pts
T_H_vec[ind] := T_H_out* + (T_H_in - T_H_out*)/(N_pts - 1)*(ind - 1)
h_H_ref := h_N2(T_ref, p_H_in)
T_L_vec[ind] := T_L_in + (T_L_out* - T_L_in)/(N_pts - 1)*(ind - 1)
h_L_ref := h_N2(T_ref, p_L_in)
# ---------------------- mean properties between T_H_in = 300 K and T_H_out* = 140 K ------------------------------
# ---------------------- mean properties between T_L_in = 80 K and T_L_out* = 280 K ------------------------------
ρ_L_av := mean(vectorize(ρ_N2(T_L_vec, p_L_in)))
ρ_H_av := mean(vectorize(ρ_N2(T_H_vec, p_H_in)))
μ_L_av := mean(vectorize(μ_N2(T_L_vec, p_L_in)))
μ_H_av := mean(vectorize(μ_N2(T_H_vec, p_H_in)))
k_L_av := mean(vectorize(k_N2(T_L_vec, p_L_in)))
k_H_av := mean(vectorize(k_N2(T_H_vec, p_H_in)))
Cp_L_av := mean(vectorize((h_N2(T_L_vec, p_L_in) - h_L_ref)/(T_L_vec - T_ref)))
Cp_H_av := mean(vectorize((h_N2(T_H_vec, p_H_in) - h_H_ref)/(T_H_vec - T_ref)))
v_s_L_av := mean(vectorize(v_s_N2(T_L_vec, p_L_in)))
v_s_H_av := mean(vectorize(v_s_N2(T_H_vec, p_H_in)))
γ_L_av := mean(vectorize(γ_N2(T_L_vec, p_L_in)))
γ_H_av := mean(vectorize(γ_N2(T_H_vec, p_H_in)))
Pr_L_av := Cp_L_av*μ_L_av/k_L_av
Pr_H_av := Cp_H_av*μ_H_av/k_H_av
FLUID_PROPERTIES := [
    "Property", "H stream", "L stream";
    "rho [kg/m3]", ρ_H_av*(kg/m^3)^-1, ρ_L_av*(kg/m^3)^-1;
    "Cp [J/kg_K]", Cp_H_av*(J/(kg*K))^-1, Cp_L_av*(J/(kg*K))^-1;
    "k [W/m_K]", k_H_av*(W/(m*K))^-1, k_L_av*(W/(m*K))^-1;
    "mu [Pa*s]", μ_H_av*(Pa*s)^-1, μ_L_av*(Pa*s)^-1
]
Nu_metzger(Re_av_max, τ_w) :=
    data ← [1.5, 0.092*Re_av_max^0.707; 2.5, 0.069*Re_av_max^0.728]
    linterp(data[:, 1], data[:, 2], τ_w)
# Jacob correlation for pressure drop (Holman p. 305) | HOLMAN
f`(Re_av_max, τ_w, τ_L) :=
    (0.044 + 0.08*τ_L/((τ_w - 1)^0.43 + 1.13*1/τ_L))*Re_av_max^-0.15 if not tube_form
    (0.25 + 0.118/(τ_w - 1)^1.08)*Re_av_max^-0.16 if tube_form
max_value(data) :=
    max ← max(data[1][3])
    [lookup(max, data[1][3], data[1][1])[1]; lookup(max, data[1][3], data[1][2])[1]; max]
UU_H(dd_H, yy_H, m_f) :=
    τ_H ← (yy_H*2 + δ_mask + dd_H)/dd_H
    Re_H_max ← (m_f*dd_H/((yy_H*w_HE)*μ_H_av))*max(τ_H/(sqrt((τ_H/2)^2 + τ_H^2) - 1), τ_H/(τ_H - 1))
    Nu_metzger(Re_H_max, τ_H)*k_H_av/dd_H
UU_L(dd_L, yy_L, m_f) :=
    τ_L ← (yy_L*2 + δ_mask + dd_L)/dd_L
    Re_L_max ← (m_f*dd_L/((yy_L*w_HE)*μ_L_av))*max(τ_L/(sqrt((τ_L/2)^2 + τ_L^2) - 1), τ_L/(τ_L - 1))
    Nu_metzger(Re_L_max, τ_L)*k_L_av/dd_L
Δp_L(dd_L, yy_L, m_f) :=
    [dd_L; yy_L] ← [dd_L; yy_L]*μm
    m_f ← m_f*mg/s
    τ_L ← (yy_L*2 + δ_mask + dd_L)/dd_L
    G_max ← (m_f/(yy_L*w_HE))*max(τ_L/(sqrt((τ_L/2)^2 + τ_L^2) - 1), τ_L/(τ_L - 1))
    Re_L_max ← (m_f*dd_L/((yy_L*w_HE)*μ_L_av))*max(τ_L/(sqrt((τ_L/2)^2 + τ_L^2) - 1), τ_L/(τ_L - 1))
    2*f`(Re_L_max, τ_L, τ_L)*G_max^2*floor(L_HE/(yy_L*2 + δ_mask + dd_L))*f'_factor/ρ_L_av
δQ_c(dd_H, dd_L, yy_H, yy_L, m_f) :=
    [dd_H; dd_L; yy_H; yy_L] ← [dd_H; dd_L; yy_H; yy_L]*μm
    m_f ← m_f*mg/s
    S_w ← δ_mask + max(dd_H + yy_H*2, dd_L + yy_L*2)
    N_w ← w_HE/S_w
    N_L ← L_HE/S_w
    A_conv ← min(S_w*L_HE - π*dd_H^2/4*N_L, S_w*L_HE - π*dd_L^2/4*N_L)
    Cp_min ← min(Cp_H_av, Cp_L_av)
    Cp_max ← max(Cp_H_av, Cp_L_av)
    U_tot ← 1/(t_w/k_w + 1/UU_H(dd_H, yy_H, m_f) + 1/UU_L(dd_L, yy_L, m_f))
    ntu ← U_tot*A_conv*N_w/(Cp_min*m_f)
    C ← Cp_min/Cp_max
    ε_HE ← (1 - e^(-ntu*(1 - C)))/(1 - C*e^(-ntu*(1 - C)))
    h_L_out ← (h_N2(T_H_in, 1*atm) - h_N2(T_L_in, p_L_in))*ε_HE + h_N2(T_L_in, p_L_in)
    (h_L_out - h_N2(T_H_in, p_H_in))*m_f
δQ_HE(dd_H, dd_L, yy_H, yy_L, m_f) :=
    [dd_H; dd_L; yy_H; yy_L] ← [dd_H; dd_L; yy_H; yy_L]*μm
    m_f ← m_f*mg/s
    S_w ← yy_H*2 + δ_mask + dd_H
    N_w ← w_HE/S_w
    N_L ← L_HE/S_w
    A_conv ← min(S_w*L_HE - π*dd_H^2/4*N_L, S_w*L_HE - π*dd_L^2/4*N_L)
    Cp_min ← min(Cp_H_av, Cp_L_av)
    Cp_max ← max(Cp_H_av, Cp_L_av)
    U_tot ← 1/(t_w/k_w + 1/UU_H(dd_H, yy_H, m_f) + 1/UU_L(dd_L, yy_L, m_f))
    ntu ← U_tot*(A_conv*N_w)/(Cp_min*m_f)
    C ← Cp_min/Cp_max
    ε_HE ← (1 - e^(-ntu*(1 - C)))/(1 - C*e^(-ntu*(1 - C)))
    ((h_N2(T_H_in, 1*atm) - h_N2(T_L_in, p_L_in))*ε_HE)*m_f
f_optimization(dd_H, dd_L, yy_H, yy_L, m_f) :=
    ΔQ ← δQ_c(dd_H, dd_L, yy_H, yy_L, m_f)
    Δp_L ← Δp_L(dd_L, yy_L, m_f)
    (ΔQ*W^-1 - ΔQ_T*W^-1)^2 + (Δp_L*psi^-1 - Δp_L_T*psi^-1)^2*10
dd_H := 50
dd_L := 50
yy_H := 50
mm_f := 20
yy_L := 50
Given
50 ≤ dd_H ≤ 500
50 ≤ dd_L ≤ 500
50 ≤ yy_H ≤ 500
50 ≤ yy_L ≤ 500
5 ≤ mm_f ≤ 40
2*yy_H + dd_H == 2*yy_L + dd_L  # disabled
[dd_H; dd_L; yy_H; yy_L; m_f] := Minimize(f_optimization, dd_H, dd_L, yy_H, yy_L, mm_f) = [85.7463; 85.0424; 50; 50; 22.7193]
ΔQ_cooler := δQ_c(dd_H, dd_L, yy_H, yy_L, m_f) = 0.358249 W
ΔQ_HE := δQ_HE(dd_H, dd_L, yy_H, yy_L, m_f) = 5.00254 W
Δp := Δp_L(dd_L, yy_L, m_f) = 10.0092 psi
F_Δp_L(x, y) := [x; y; Δp_L(x, y, m_dot)*psi^-1]
F_U_H(x, y) := [x; y; UU_H(x*μm, y*μm, m_dot*mg/s)*(W/(m^2*K))^-1]
F_U_L(x, y) := [x; y; UU_L(x*μm, y*μm, m_dot*mg/s)*(W/(m^2*K))^-1]
Δp_L_map := CreateMesh(F_Δp_L, 50, 500, 50, 100, 20, 20)
U_H_map := CreateMesh(F_U_H, 50, 500, 50, 100, 20, 20)
U_L_map := CreateMesh(F_U_L, 50, 500, 50, 100, 20, 20)
dd_H = 85.7463
Δp_L
m_dot ≡ 23
# [component: inputs Δp_L_map]
dd_L = 85.0424
FLUID_PROPERTIES = [
    "Property", "H stream", "L stream";
    "rho [kg/m3]", 306.113, 2.94654;
    "Cp [J/kg_K]", 1431.97, 1044.77;
    "k [W/m_K]", 0.0416502, 0.0167421;
    "mu [Pa*s]", 2.53781e-5, 1.16396e-5
]
yy_H = 50
yy_L = 50
m_f = 22.7193
ΔQ_cooler = 0.358249 W
y_L*μm
ΔQ_HE = 5.00254 W
Δp = 10.0092 psi
d_L*μm
# U_H*W/(m^2*K) | U_L*W/(m^2*K)
# [component: inputs U_H_map]
# [component: inputs U_L_map]
m_dot = 23
# y_H*μm | y_L*μm
# d_H*μm | d_L*μm
